// SBML level 3 version 2

model biocrnpyler_792704()
  // model units - substance: mole, time: second, volume: litre, area: square_metre, length: metre, extent: mole

  // Compartments:
  compartment default = 1e-6;

  // Species:
  species dna_ugate in default = 0;
  species rna_ugate in default = 0;
  species dna_input in default = 0;
  species rna_input_rna in default = 0;
  species rna_gate in default = 0;
  species rna_input_gate_ in default = 0;
  species protein_ribozyme in default = 0;

  // Parameters:
  ktx__ = 0.05;
  kb__ = 100;
  ku__ = 20;
  kcat__ = 10;
  kdil__ = 0.0075;

  // Reactions:
  r0: dna_ugate => dna_ugate + rna_ugate; ktx__*dna_ugate;
  r1: dna_input => dna_input + rna_input_rna; ktx__*dna_input;
  r2: rna_gate + rna_input_rna => rna_input_gate_; kb__*rna_gate*rna_input_rna;
  r2rev: rna_input_gate_ => rna_gate + rna_input_rna; ku__*rna_input_gate_;
  r3: protein_ribozyme + rna_ugate => protein_ribozyme + rna_gate; kcat__*protein_ribozyme*rna_ugate;
  r4: rna_gate => ; kdil__*rna_gate;
  r5: rna_ugate => ; kdil__*rna_ugate;
  r6: rna_input_rna => ; kdil__*rna_input_rna;
  r7: rna_input_gate_ => ; kdil__*rna_input_gate_;

  // Unit definitions:
  unit square_metre = metre^2;
end
